pi1 := 0.4
pi2 := 0.5
p2100 := 0.1
p1011 := 0.1
pxx11 := 0.1
p1001 := 0.1
px101 := 0.1
p1100 := 0.1
px100 := 0.1
p2111 := 0.1
p2101 := 0.1
px111 := 0.1
p1101 := 0.1
p1111 := 0.1
p2001 := 0.1
p1x11 := 0.1
Given
p1001 == p2100*(1 - pi1) + p2101*(1 - pi1)*(1 - pi2)
p1100 == p2100*pi1 + p2101*(pi1*(1 - pi2)) + p2001*(1 - pi2)
px100 == p1100*pi1 + p1101*(pi1*(1 - pi2)) + px101*(pi1*(1 - pi2))
p2101 == p1001*pi2 + p1100*(1 - pi1) + px101*(1 - pi1)*(1 - pi2) + p1101*(1 - pi1)*(1 - pi2) + p1011*(1 - pi2)
p1101 == p2111*pi1*(1 - pi2) + p2101*pi1*pi2
p1011 == p2111*(1 - pi1)*pi2 + p2101*(1 - pi1)*pi2
px101 == p1101*pi1*pi2 + p1111*pi1*(1 - pi2) + px111*pi1*(1 - pi2) + px101*pi1*pi2
p1x11 == p2111*(1 - pi1)*pi2
px111 == p1111*pi1*pi2 + px111*pi1*pi2
p1111 == p2111*pi1*pi2
p2100 == p1001*(1 - pi2)
p2111 == px111*(1 - pi1)*(1 - pi2) + p1011*(1 - pi1)*pi2 + p1101*(1 - pi1)*pi2 + px101*(1 - pi1)*pi2 + p1x11*(1 - pi2) + p1111*(1 - pi1)*(1 - pi2) + pxx11*(1 - pi1)*(1 - pi2)
1 == p2100 + p1001 + p1100 + px100 + p2101 + p1101 + p1011 + px101 + p2111 + px111 + p1111 + p1x11 + pxx11
probabilitiesArr := Find(p2100, p1001, p1100, px100, p2101, p1101, p1011, px101, p2111, px111, p1111, p1x11, pxx11)
sum(probabilitiesArr) = 1
probabilitiesArr = [0.0352455; 0.070491; 0.096994; 0.055747; 0.164479; 0.0608173; 0.0912259; 0.0239298; 0.139607; 0.00698037; 0.0279215; 0.0418822; 0.184679]
Potk := 0
# лишняя строка системы уравнений
pxx11 == px111*(1 - pi1)*pi2 + p1111*(1 - pi1)*pi2 + p1x11*pi2
Pblock := probabilitiesArr[3] + probabilitiesArr[7] + probabilitiesArr[9] + probabilitiesArr[11] + probabilitiesArr[12]
Pblock = 0.313219
A := 0.5*(1 - Pblock)
A = 0.343391
Loch := probabilitiesArr[6] + probabilitiesArr[8] + probabilitiesArr[9] + probabilitiesArr[10] + probabilitiesArr[11] + probabilitiesArr[1]
Loch = 0.378108
Ls := probabilitiesArr[0] + probabilitiesArr[1] + probabilitiesArr[2] + probabilitiesArr[3] + probabilitiesArr[4] + probabilitiesArr[5] + 2*probabilitiesArr[6] + probabilitiesArr[7] + 2*probabilitiesArr[8] + 2*probabilitiesArr[9] + 2*probabilitiesArr[10] + 2*probabilitiesArr[11] + 2*probabilitiesArr[12]
Ls = 1.4923
Ws := Ls/A
Ws = 4.34577
